<?xml version="1.0"?>
 <!--
    This program is free software: you can redistribute it and/or modify
    it under the terms of the GNU General Public License as published by
    the Free Software Foundation, either version 2 of the License, or
    (at your option) any later version.

    This program is distributed in the hope that it will be useful,
    but WITHOUT ANY WARRANTY; without even the implied warranty of
    MERCHANTABILITY or FITNESS FOR A PARTICULAR PURPOSE.  See the
    GNU General Public License for more details.

    You should have received a copy of the GNU General Public License
    along with this program.  If not, see <http://www.gnu.org/licenses/>.
    -->
<?xml-stylesheet type="text/xsl" href="http://jsbsim.sourceforge.net/JSBSim.xsl"?>
<fdm_config xmlns:xsi="http://www.w3.org/2001/XMLSchema-instance" name="CRJ1000ER" version="2.0" release="ALPHA" xsi:noNamespaceSchemaLocation="http://jsbsim.sourceforge.net/JSBSim.xsd">
	<fileheader>
		<author> Benedikt Wolf (D-ECHO) using Aeromatic v 3.3.10 </author>
		<filecreationdate> 01 Jan 2020 </filecreationdate>
		<version>01/2020</version>
	</fileheader>
	<metrics file="Systems/metrics.xml">
		<htailarm unit="M">		14	</htailarm>
		<vtailarea unit="FT2">		119.36	</vtailarea>
		<vtailarm unit="M">		16	</vtailarm>
		<location name="AERORP" unit="M">
			<x>     1.70 </x>
			<y>     0.00 </y>
			<z>    -2.00 </z>
		</location>
		<location name="EYEPOINT" unit="M">
			<x> -15.045 </x>
			<y>  -0.528 </y>
			<z>  -0.468 </z>
		</location>
	</metrics>
	<mass_balance file="Systems/CRJ1000-mass_balance.xml"/>
	<propulsion file="Systems/CRJ1000-propulsion.xml">
		<tank type="FUEL" number="0">
			<location unit="M">
				<x>   1.69 </x>
				<y>  -5.62 </y>
				<z>   1.99 </z>
			</location>
			<capacity unit="LBS"> 8621 </capacity>
			<contents unit="LBS"> 4000 </contents>
		</tank>
		<tank type="FUEL" number="1">
			<location unit="M">
				<x>   1.69 </x>
				<y>   5.62 </y>
				<z>   1.99 </z>
			</location>
			<capacity unit="LBS"> 8621 </capacity>
			<contents unit="LBS"> 4000 </contents>
		</tank>
		<tank type="FUEL" number="2">
			<location unit="M">
				<x>  0.00  </x>
				<y>  0.00  </y>
				<z> -2.20  </z>
			</location>
			<capacity unit="LBS"> 5298 </capacity>
			<contents unit="LBS"> 2500 </contents>
		</tank>
	</propulsion>
	<ground_reactions file="Systems/CRJ1000-ground_reactions.xml"/>
	<system file="fcs.xml"/>
	<flight_control name="FCS"/>
	<aerodynamics file="Systems/aerodynamics.xml"/>
	<external_reactions file="Systems/external_reactions.xml"/>
</fdm_config>
