<?xml version="1.0"?>
 <!--
    This program is free software: you can redistribute it and/or modify
    it under the terms of the GNU General Public License as published by
    the Free Software Foundation, either version 2 of the License, or
    (at your option) any later version.

    This program is distributed in the hope that it will be useful,
    but WITHOUT ANY WARRANTY; without even the implied warranty of
    MERCHANTABILITY or FITNESS FOR A PARTICULAR PURPOSE.  See the
    GNU General Public License for more details.

    You should have received a copy of the GNU General Public License
    along with this program.  If not, see <http://www.gnu.org/licenses/>.
    -->
<?xml-stylesheet type="text/xsl" href="http://jsbsim.sourceforge.net/JSBSim.xsl"?>
<fdm_config xmlns:xsi="http://www.w3.org/2001/XMLSchema-instance" name="CRJ700" version="2.0" release="ALPHA" xsi:noNamespaceSchemaLocation="http://jsbsim.sourceforge.net/JSBSim.xsd">
	<fileheader>
		<author> Benedikt Wolf (D-ECHO) using Aeromatic v 3.3.10 </author>
		<filecreationdate> 01 Jan 2020 </filecreationdate>
		<version>01/2020</version>
	</fileheader>
	<metrics file="Systems/metrics.xml">
		<htailarm unit="FT">		49.21	</htailarm>
		<vtailarea unit="FT2">		119.36	</vtailarea>
		<vtailarm unit="FT">		39.37	</vtailarm>
		<location name="AERORP" unit="M">
			<x>     1.33 </x>
			<y>     0.00 </y>
			<z>    -2.00 </z>
		</location>
		<location name="EYEPOINT" unit="M">
			<x> -13.105 </x>
			<y>  -0.528 </y>
			<z>  -0.468 </z>
		</location>
	</metrics>
	<mass_balance file="Systems/CRJ700-mass_balance.xml"/>
	<propulsion file="Systems/CRJ700-propulsion.xml">
		<tank type="FUEL" number="0">
			<location unit="M">
				<x>   0.8 </x>
				<y>  -4.8 </y>
				<z>   1.9 </z>
			</location>
			<capacity unit="LBS"> 7554 </capacity>
			<contents unit="LBS"> 5000 </contents>
		</tank>
		<tank type="FUEL" number="1">
			<location unit="M">
				<x>   0.8 </x>
				<y>   4.8 </y>
				<z>   1.9 </z>
			</location>
			<capacity unit="LBS"> 7554 </capacity>
			<contents unit="LBS"> 5000 </contents>
		</tank>
		<tank type="FUEL" number="2">
			<location unit="M">
				<x> -0.329 </x>
				<y>  0.00  </y>
				<z> -2.2   </z>
			</location>
			<capacity unit="LBS"> 4642 </capacity>
			<contents unit="LBS"> 3000 </contents>
		</tank>
	</propulsion>
	<ground_reactions file="Systems/CRJ700-ground_reactions.xml"/>
	<system file="fcs.xml"/>
	<flight_control name="FCS: CRJ700"/>
	<aerodynamics file="Systems/aerodynamics.xml"/>
	<external_reactions file="Systems/CRJ700-external_reactions.xml"/>
</fdm_config>
